// COMSOL Multiphysics 6.2.0.415 model "2DAxi_ringfault updated2-2.mph"
// Outline of the model tree

Parameters
  ang = atan2(-3000+4500,2000-1500)

Variables
  var1 "Variables 1"
    COD = nojac(sqrt((up(u)-down(u))^2+(up(w)-down(w))^2))

Coordinate systems
  sys1: Boundary "Boundary System 1" | mastersystem = globalCartesianMaterial
  ie1: InfiniteElement "Infinite Element Domain 1" on domains 1, 3, 4 | ScalingType = Cylindrical
  sys2: VectorBase "Base Vector System 2"
    base = {{cos(ang), 0, -sin(ang)}, {0, 1, 0}, {sin(ang), 0, cos(ang)}}
    orthonormal = on

Geometry
  geom1 "Geometry 1" (2D axisymmetric, length unit m)
    sq1: Square | pos = {0, -20000}; layername = Layer 1; layer = 0.2e4; layerright = on; size = 20000
    pol1: Polygon | source = table; table = {{0, 600}, {1500, 600}, {1500, 1200}, {10000, 0}, {0, 0}}
    c1: Circle | pos = {0, -5000}; r = 1000
    dif1: Difference | input = sq1; input2 = c1
    ls1: LineSegment | specify1 = coord; coord1 = {1000, -3500}; specify2 = coord; coord2 = {1500, -500}
    fin: Finalize "Form Union" | pairtype = contact
    ige1: IgnoreEdges | input = fin(1) boundaries 7

Materials
  mat1: Common "Material 1" on all domains
    def "Basic"
      youngsmodulus = 2e10
      poissonsratio = 0.25
      density = 2600

Physics
  solid: SolidMechanics on all domains
    dependent variable u = {u, v, w}
    ShapeProperty.order_displacement = 2
    AdvancedSettings.GroupPhysOdesRc = 0
    AdvancedSettings.GroupPhysOdesAtt = 0
    AdvancedSettings.GroupPhysOdesRd = 0
    lemm1: LinearElasticModel "Linear Elastic Material Model 1" (default) | minput_strainreferencetemperature = 0
    axi1: AxialSymmetrySolid "Axial Symmetry 1" (default)
    free1: Free (default)
    init1: init "Initial Values 1" (default)
    roll1: Roller on boundaries 15, 16
    bndl1: BoundaryLoad on boundaries 17, 18 | LoadType = FollowerPressure; FollowerPressure = 10e6
    fix1: Fixed "Fixed Constraint 1" on boundaries 2, 11 | constraintMethod = elemental
    crack1: Crack on boundaries 7
      crc1: CrackClosure on all boundaries
    lsr1: LocalSystemResults on all domains | coordinateSystem = sys2

Mesh
  mesh1 "Mesh 1"
    size: MeshSizeDefault | hauto = 4
    size1: Size on points 7, 8 | hauto = 1
    map1: Map "Mapped 1" on domains 1, 3, 4
      dis1: Distribution on boundaries 1, 10, 11, 13-15
    ftri1: FreeTri "Free Triangular 1" on remaining entities

Studies
  std1 "Study 1"
    stat: Stationary | geometricNonlinearity = on

Solver configurations
  sol1 "Solver 1" (study std1)
    v1: Variables "Dependent Variables 1"
    s1: Stationary "Stationary Solver 1" | stol = 0.0010
      dDef: Direct | thresh = 0.1; rhob = 400
      fc1: FullyCoupled

Datasets
  dset1: Solution | solution = sol1
  rev1: Revolve2D "Revolution 2D 1" | data = dset1; startangle = -90; revangle = 225
  cln1: CutLine2D | data = dset1; genpoints = {{0, 0}, {50000, 0}}

Plots
  pg1: PlotGroup2D "Stress (solid)" | data = dset1
    surf1: Surface | expr = w
  pg2: PlotGroup3D "Stress, 3D (solid)" | data = rev1
    surf1: Surface | expr = w
  pg3: PlotGroup1D "1D Plot Group 3" | data = dset1
    lngr1: LineGraph on boundaries 6, 8, 9 | expr = w; xdata = expr; xdataexpr = r
    lngr2: LineGraph on boundaries 6, 8, 9 | expr = u; xdata = expr; xdataexpr = r
  pg4: PlotGroup2D "2D Plot Group 4" | data = dset1
  pg5: PlotGroup2D "2D Plot Group 5" | data = dset1
    mesh1: Mesh
  pg6: PlotGroup1D "1D Plot Group 6" | data = dset1
    lngr1: LineGraph "COD" on boundaries 7 | expr = COD; legends = COD
    lngr2: LineGraph "Average displacement" on boundaries 7 | expr = solid.disp; legends = avg disp
  pg7: PlotGroup1D "1D Plot Group 7" | data = dset1
    lngr1: LineGraph on boundaries 7 | expr = solid.lsr1.u1
    lngr2: LineGraph on boundaries 7 | expr = solid.lsr1.u3
    lngr5: LineGraph on boundaries 7 | expr = up(solid.lsr1.u1)
    lngr6: LineGraph on boundaries 7 | expr = down(solid.lsr1.u1)

Exports
  data1: Data
    data = cln1
    expr = {w, u}
    unit = {m, m}
    descr = {"Displacement field, Z component", "Displacement field, R component"}
    location = grid
    gridx1 = range(0,250,50000)
  img1: Image "2D Image 1"
    sourceobject = pg4
    size = manualweb
    unit = mm
    width = 212
    height = 159
    sizedesc = 801 x 601 px
    jpegfilename = /Users/jh6666/Desktop/mogi_geometry.jpg
    addsuffix = off